// COMSOL Multiphysics 6.2.0.339 model "QNMEig_const_Sphere.mph"
// Outline of the model tree

Parameters
  eps_real = 16
  epsilonb = 1  // background permittivity
  lambda_pml = 600 [nm]  // Typical working wavelength for which PMLs should work properly
  r0 = 100[nm]  // Silver-sphere radius
  rb = 230 [nm]  // Outermost background radius
  tpml = 80 [nm]  // PML thickness
  lambda_N = 100 [nm]  // Normalization parameter
  sym_factor = 1  // Symmetrical factor

Variables
  var1 "Variables 1"
    QNM_omega = (lambda/(-j)) [rad/s]  // QNM eigen-angular frequencies
  var3 "QNM normalization"
    QN = 2*sym_factor*intAll((emw.Ex*emw.Dx+emw.Ey*emw.Dy+emw.Ez*emw.Dz)*pml1.detInvT)  // QNM normalization

Selections
  sel1: Explicit "PML" on domains 1-4, 7-10
  sel2: Explicit "Air background and its attached PML" on domains 1-5, 7-10
  sel3: Explicit "Sphere" on domains 6

Couplings
  intop1: Integration "All-domain integration" on all domains | opname = intAll

Coordinate systems
  pml1: PML "Perfectly Matched Layer 1" on selection sel1
    ScalingType = Spherical
    wavelengthSourceType = userDefined
    typicalWavelength = lambda_pml

Geometry
  geom1 "Geometry 1" (3D, length unit m)
    sph1: Sphere | r = r0
    sph2: Sphere | layername = Layer 1; layer = tpml; r = rb+tpml
    fin: Finalize "Form Union"

Materials
  mat1: Common "Material 1" on selection sel3
    def "Basic"
      relpermeability = 1
      electricconductivity = 0
      relpermittivity = eps_real
  mat2: Common "Material 2" on selection sel2
    def "Basic"
      relpermittivity = epsilonb
      relpermeability = 1
      electricconductivity = 0

Physics
  emw: ElectromagneticWaves "Electromagnetic Waves, Frequency Domain" on all domains
    dependent variable E = {Ex, Ey, Ez}
    MeshControl.SizeControlParameter = FromStudy
    AnalysisMethodology.MethodologyOptions = Robust
    wee1: WaveEquationElectric (default)
    pec1: PerfectElectricConductor (default)
    init1: init "Initial Values 1" (default)
    sctr1: Scattering "Scattering Boundary Condition 1" on boundaries 5-8, 20, 21, 28, 35

Mesh
  mesh1 "Mesh 1" (physics-controlled)
    size: MeshSizeDefault | hauto = 1

Studies
  std1 "Study 1"
    eig: Eigenfrequency
      neigs = 2
      eigunit = Hz
      shift = c_const/700[nm]
      discretization = {emw, physics, frame:material1, physics}